// COMSOL Multiphysics 5.3.1.201 model "60 deg.mph"
// Outline of the model tree

Parameters
  theta = pi/3
  xc = 6-3/tan(theta)

Geometry
  geom1 "Geometry 1" (2D, length unit m)
    pol1: Polygon | x = 0,0,xc,6; y = 0,3,3,0
    fin: Finalize "Form Union"

Physics
  lpeq: LaplaceEquation on all domains
    dependent variable u
    leq1: LaplaceEquation (default)
    zflx1: ZeroFluxBoundary "Zero Flux 1" (default)
    init1: init "Initial Values 1" (default)
    dir1: DirichletBoundary "Dirichlet Boundary Condition 1" on boundaries 2 | r = 200
    zflx2: ZeroFluxBoundary "Zero Flux 2" on boundaries 1, 4
    flux1: FluxBoundary "Flux/Source 1" on boundaries 3 | g = 20; q = 1

Mesh
  mesh1 "Mesh 1" (physics-controlled)
    size: MeshSizeDefault | hauto = 3

Studies
  std1 "Study 1"
    stat: Stationary

Solver configurations
  sol1 "Solution 1" (study std1)
    v1: Variables "Dependent Variables 1"
    s1: Stationary "Stationary Solver 1"
      dDef: Direct
      fc1: FullyCoupled | linsolver = dDef

Datasets
  dset1: Solution | solution = sol1

Plots
  pg1: PlotGroup2D "2D Plot Group 1" | data = dset1; xlabel = x; ylabel = y
    surf1: Surface | expr = u
  pg2: PlotGroup2D "2D Plot Group 2" | data = dset1
    con1: Contour | expr = u; levels = range(0,10,100)

Exports
  data1: Data
    data = dset1
    expr = u
    filename = C:\Users\Manos\Desktop\COMPMECH\1ο Εξάμηνο\Προχωρημένες Υπολογιστικές Μέθοδοι\HW2\Final\comsol_60deg.txt
  plot1: Plot
    filename = C:\Users\Manos\Desktop\COMPMECH\1ο Εξάμηνο\Προχωρημένες Υπολογιστικές Μέθοδοι\HW2\Final\comsol_cont_60deg.txt